// SBML level 2 version 4

model AtherosclerosisPathwayAug16()
  // Parton2018 - A model of Atherosclerosis and atheroma formation.
  // SBML and SBGN-ML models of atherosclerosis and atheroma formation.
  // This model is described in the publication: New models of atherosclerosis and multi-drug therapeutic interventions.
  // Andrew Parton, Victoria McGilligan, Melody Chemaly, Maurice O’Kane, Steven Watterson
  // Bioinformatics, bty980, https://doi.org/10.1093/bioinformatics/bty980
  // Motivation. Atherosclerosis is amongst the leading causes of death globally. However, it is challenging to study in vivo or in vitro and no detailed, openly-available computational models exist. Clinical studies hint that pharmaceutical therapy may be possible. Here we develop the first detailed, computational model of atherosclerosis and use it to develop multi-drug therapeutic hypotheses. Results. We assembled a network describing atheroma development from the literature. Maps and mathematical models were produced using the Systems Biology Graphical Notation (SBGN) and Systems Biology Markup Language (SBML), respectively. The model was constrained against clinical and laboratory data. We identified five drugs that together potentially reverse advanced atheroma formation.
  // Availability and Implementation. The map is available in the supplementary information in SBGN-ML format. The model is available in the supplementary material and from BioModels, a repository of SBML models, containing CellDesigner markup.

  // Compartments:
  compartment Liver in default = 1 volume;
  compartment Intestine in default = 1 volume;
  compartment Lumen in default = 1 volume;
  compartment Endothelium in default = 1 volume;
  compartment Intima in default = 1 volume;
  compartment T_Cell in Lumen = 1 volume;
  compartment Platelet in Lumen = 1 volume;
  compartment TNK in Intima = 1 volume;
  compartment TFH in Intima = 1 volume;
  compartment Th1 in Intima = 1 volume;
  compartment Th2 in Intima = 1 volume;
  compartment Th17 in Intima = 1 volume;
  compartment B2_Cell in Intima = 1 volume;
  compartment Mast_Cell in Intima = 1 volume;
  compartment Dendritic_Cell in Intima = 1 volume;
  compartment B1_Cell = 1 volume;
  compartment Endothelial_Cell in Endothelium = 1 volume;
  compartment default = 1 volume;
  compartment M1 in Lumen = 1 volume;
  compartment NTC in Intima = 1 volume;
  compartment M2 = 1 volume;
  compartment FC1 in Intima = 1 volume;
  compartment NAM1 = 1 volume;
  compartment N1 in Intima = 1 volume;
  compartment SMC1 = 1 volume;
  compartment T1 in Intima = 1 volume;

  // Species:
  species HDL_Intima in Intima = 0;
  species LDL_Intima in Intima = 0;
  substanceOnly species Endothelial_Cell_Endothelial_Cell in Endothelial_Cell = 20000;
  substanceOnly species $s4 in Lumen = 0;
  substanceOnly species LDL_Lumen in Lumen = 190000;
  substanceOnly species HDL_Lumen in Lumen = 40000;
  species PB_HDL in Intima = 0; PB_HDL is "PB-HDL";
  species PB_LDL in Intima = 0; PB_LDL is "PB-LDL";
  substanceOnly species Proteoglycans in Intima = 10;
  substanceOnly species Free_Oxygen_Radicals in Intima = 500;
  substanceOnly species PLA2 in Intima = 10;
  substanceOnly species SMAse in Intima = 10;
  substanceOnly species Lipoxygenase in Intima = 10;
  species oxLDL in Intima = 0;
  species oxHDL in Intima = 0;
  substanceOnly species Monocyte in M1 = 20000;
  species $s17 in Lumen = 0;
  substanceOnly species Empty_HDL in Liver = 20;
  species Macrophage in M2 = 0;
  species $s20 in Intima = 0;
  species Foam_Cell in FC1 = 0;
  species VLDL_Lumen in Lumen = 0;
  substanceOnly species ABCG1 in FC1 = 10;
  species Cholesterol_Liver in Liver = 0;
  species $s25 in Liver = 0;
  substanceOnly species ABCA1 in FC1 = 10;
  species Smooth_Muscle_Cell in SMC1 = 0;
  species $s28 in Intima = 0;
  species IDL in Lumen = 0;
  substanceOnly species Triglycerides in Lumen = 146000;
  substanceOnly species Free_Fatty_Acids in Lumen = 10;
  substanceOnly species CCL2_Lumen in Lumen = 150000;
  substanceOnly species Mast_Cell_Mast_Cell in Mast_Cell = 10;
  substanceOnly species Dendritic_Cell_Dendritic_Cell in Dendritic_Cell = 10;
  substanceOnly species Neutrophil in N1 = 10;
  substanceOnly species IFN_Gamma in Intima = 10; IFN_Gamma is "IFN-Gamma";
  substanceOnly species B1_Cell_B1_Cell in B1_Cell = 10;
  substanceOnly species B2_Cell_B2_Cell in B2_Cell = 10;
  substanceOnly species T_Cell_T_Cell in T_Cell = 500000;
  species naive_T_Cell in NTC = 0;
  species Th1_Th1 in Th1 = 0;
  species Th2_Th2 in Th2 = 0;
  species Th17_Th17 in Th17 = 0;
  species TFH_TFH in TFH = 0;
  species Treg in T1 = 0;
  species TNK_TNK in TNK = 0;
  substanceOnly species IL_1 in Intima = 1; IL_1 is "IL-1";
  substanceOnly species IL_2 in Intima = 1; IL_2 is "IL-2";
  substanceOnly species IL_4 in Intima = 1; IL_4 is "IL-4";
  substanceOnly species IL_5 in Intima = 1; IL_5 is "IL-5";
  substanceOnly species IL_6 in Intima = 1; IL_6 is "IL-6";
  substanceOnly species IL_10 in Intima = 1; IL_10 is "IL-10";
  substanceOnly species IL_17 in Intima = 1; IL_17 is "IL-17";
  substanceOnly species IL_12 in Intima = 1; IL_12 is "IL-12";
  substanceOnly species IL_18 in Intima = 1; IL_18 is "IL-18";
  substanceOnly species IL_21 in Intima = 1; IL_21 is "IL-21";
  substanceOnly species IL_33 in Intima = 1; IL_33 is "IL-33";
  substanceOnly species TNF in Intima = 0;
  species MMP13 in Intima = 0;
  species MMP9 in Intima = 0;
  species MMP3 in Intima = 0;
  species MMP1 in Intima = 0;
  species PDGF in Intima = 0;
  substanceOnly species CCL2_Intima in Intima = 1;
  substanceOnly species TGF_Beta in Intima = 1; TGF_Beta is "TGF-Beta";
  species Collagen in Intima = 0;
  species $s67 in Liver = 0; s67 is "s26";
  species TIMP1 in Intima = 0;
  species TIMP2 in Intima = 0;
  species TIMP3 in Intima = 0;
  species TIMP4 in Intima = 0;
  species Tryptase in Intima = 0;
  species Chymase in Intima = 0;
  species Bile_Acids in Liver = 0;
  substanceOnly species CL_HDL_Liver in Liver = 20; CL_HDL_Liver is "CL-HDL";
  species VLDL_Liver in Liver = 0;
  substanceOnly species Cholesterol_Intestine in Intestine = 20;
  species Chylomicron_Intestine in Intestine = 0;
  species $NullChylo in Intestine = 0;
  species Remnant_Chylomicrons in Lumen = 0;
  substanceOnly species Lipoprotein_Lipase in Lumen = 20;
  species Chylomicron_Lumen in Lumen = 0;
  substanceOnly species Platelet_Platelet in Platelet = 10;
  substanceOnly species MCSF in Intima = 100;
  species IL_1Beta in Lumen = 0; IL_1Beta is "IL-1Beta";
  species $s88 in Lumen = 0;
  species CL_HDL_Intima in Intima = 0; CL_HDL_Intima is "CL-HDL";
  species $s90 in Intima = 0;
  species $s91 in Intima = 0;
  species $s92 in Lumen = 0;
  species Non_activated_Macrophage in NAM1 = 0; Non_activated_Macrophage is "Non-activated Macrophage";
  species $s94 in Intima = 0;
  species $s95 in Intima = 0;
  species $s96 in Intima = 0;
  species $s97 in Lumen = 0;
  species Elastin in Intima = 0;
  substanceOnly species EGF in Intima = 1;
  substanceOnly species CXCL9 in Lumen = 0;
  substanceOnly species CXCL10 in Lumen = 0;
  substanceOnly species CXCL11 in Lumen = 0;
  species $s103 in Intima = 0;
  species $s104 in Intima = 0;
  species $s105 in Intima = 0;
  substanceOnly species CCL5 in Lumen = 0;
  species $s110 in Intima = 0;
  species $s111 in Intima = 0;
  species $s112 in Intima = 0;
  species $s113 in Intima = 0;
  species $s114 in Intima = 0;
  species $s115 in Intima = 0;
  species $s116 in Lumen = 0;
  species $s117 in Intima = 0;
  species $s118 in Intima = 0;
  substanceOnly species TACE in Intima = 1;
  species $s125 in Lumen = 0;
  substanceOnly species MMP2 in Intima = 1;
  species $s127 in Intima = 0;
  species $s128 in Intima = 0;
  species $s129 in Intima = 0;
  species $s130 in Intima = 0;
  species sa49_degraded in Intima = 0;

  // Reactions:
  re1: HDL_Lumen => HDL_Intima; j_hl*HDL_Lumen;
    j_hl = 0.0148 substance;
  re2: LDL_Lumen => LDL_Intima; LDL_Lumen*j_ll;
    j_ll = 0.0148 substance;
  re3: HDL_Intima => PB_HDL; k_hpb*HDL_Intima*Proteoglycans;  // modifiers: Proteoglycans
    k_hpb = 2000000 substance;
  re4: LDL_Intima => PB_LDL; LDL_Intima*Proteoglycans*k_lpb;  // modifiers: Proteoglycans
    k_lpb = 2000000 substance;
  re5: PB_HDL + Free_Oxygen_Radicals => oxHDL; k_oxh*PB_HDL*Free_Oxygen_Radicals*PLA2*SMAse*Lipoxygenase/(k_moxh + PB_HDL);  // modifiers: PLA2, SMAse, Lipoxygenase
    k_oxh = 100 substance; k_moxh = 9e9 substance;
  re6: PB_LDL + Free_Oxygen_Radicals => oxLDL; PB_LDL*Free_Oxygen_Radicals*Lipoxygenase*SMAse*PLA2*k_oxl/(k_moxl + PB_LDL);  // modifiers: Lipoxygenase, SMAse, PLA2
    k_oxl = 235 substance; k_moxl = 9e9 substance;
  re7: VLDL_Lumen => IDL + Triglycerides + Free_Fatty_Acids; k_idl*VLDL_Lumen*Lipoprotein_Lipase;  // modifiers: Lipoprotein_Lipase
    k_idl = 1 substance;
  re8: IDL => LDL_Lumen + Triglycerides + Free_Fatty_Acids; k_ldl*IDL*Lipoprotein_Lipase;  // modifiers: Lipoprotein_Lipase
    k_ldl = 1e-8 substance;
  re9: $s4 => CCL2_Lumen; k_mcpecMM*Endothelial_Cell_Endothelial_Cell*oxLDL*IL_1Beta/((km_mcpec + oxLDL)*(km_mcpil1b + IL_1Beta));  // modifiers: Endothelial_Cell_Endothelial_Cell, oxLDL, IL_1Beta
    k_mcpecMM = 2250 substance; km_mcpec = 150000 substance; km_mcpil1b = 1 substance;
  re10: $s17 => Monocyte; re10_k_monoL*CCL2_Lumen^2/(km_mono^2 + CCL2_Lumen^2);  // modifiers: CCL2_Lumen
    re10_k_monoL = 0.3 substance; km_mono = 400000 substance;
  re11: Monocyte => Monocyte; re11_k_monoL*Monocyte;
    re11_k_monoL = 0.3 substance;
  re12: Monocyte => Macrophage; k_mdiff*MCSF*Monocyte;  // modifiers: MCSF
    k_mdiff = 9.900004e5 substance;
  re13: $s20 => MCSF; k_mcsf*Macrophage/(km_mcsf + Macrophage);  // modifiers: Macrophage
    k_mcsf = 10 substance; km_mcsf = 1000000 substance;
  re14: oxLDL + Macrophage => Foam_Cell; k_fc*oxLDL*Macrophage*IFN_Gamma/((k_mfc + Macrophage)*(k_mfco + oxLDL));  // modifiers: IFN_Gamma
    k_fc = 0.03 substance; k_mfc = 20000 substance; k_mfco = 20000000 substance;
  re15: $s28 => Smooth_Muscle_Cell; k_smc*CCL2_Intima^0.25*PDGF/((k_msmcp + PDGF)*(k_msmcc + CCL2_Intima^0.25));  // modifiers: PDGF, CCL2_Intima
    k_smc = 1e12 substance; k_msmcp = 18000 substance; k_msmcc = 180 substance;
  re16: T_Cell_T_Cell => naive_T_Cell; k_tt*T_Cell_T_Cell;
    k_tt = 0.0001 substance;
  re20: $s25 => VLDL_Liver; k_vldll*Cholesterol_Liver;  // modifiers: Cholesterol_Liver
    k_vldll = 100 substance;
  re21: $s67 => Empty_HDL; 0;
  re22: CL_HDL_Liver => Empty_HDL + Bile_Acids; k_ehdl*CL_HDL_Liver;
    k_ehdl = 0.01 substance;
  re23: $NullChylo => Chylomicron_Intestine; k_chyi*Cholesterol_Intestine;  // modifiers: Cholesterol_Intestine
    k_chyi = 0.001 substance;
  re24: Chylomicron_Lumen => Remnant_Chylomicrons; k_chyrl*Chylomicron_Lumen*Lipoprotein_Lipase;  // modifiers: Lipoprotein_Lipase
    k_chyrl = 0.001 substance;
  re25: Chylomicron_Intestine => Chylomicron_Lumen; k_chyl*Chylomicron_Intestine;
    k_chyl = 0.001 substance;
  re26: Remnant_Chylomicrons => Cholesterol_Liver; k_iccr*Remnant_Chylomicrons;
    k_iccr = 0.01 substance;
  re27: VLDL_Liver => VLDL_Lumen; k_vldl*VLDL_Liver;
    k_vldl = 0 substance;
  re32: $s125 => CXCL9; k_cx9*Endothelial_Cell_Endothelial_Cell*IFN_Gamma;  // modifiers: Endothelial_Cell_Endothelial_Cell, IFN_Gamma
    k_cx9 = 0.01 substance;
  re33: $s125 => CXCL10; k_cx10*Endothelial_Cell_Endothelial_Cell*IFN_Gamma;  // modifiers: Endothelial_Cell_Endothelial_Cell, IFN_Gamma
    k_cx10 = 0.01 substance;
  re34: $s125 => CXCL11; k_cx11*Endothelial_Cell_Endothelial_Cell*IFN_Gamma;  // modifiers: Endothelial_Cell_Endothelial_Cell, IFN_Gamma
    k_cx11 = 0.01 substance;
  re35: $s125 => IL_1Beta; k_il1bl*Platelet_Platelet;  // modifiers: Platelet_Platelet
    k_il1bl = 1 substance;
  re36: $s88 => T_Cell_T_Cell; kmm_tl*(CXCL9 + CXCL10 + CXCL11)*CCL5/(k_mtl + CCL5);  // modifiers: CXCL9, CXCL10, CXCL11, CCL5
    kmm_tl = 0.01 substance; k_mtl = 300000 substance;
  re37: Foam_Cell + PB_HDL => CL_HDL_Intima + Non_activated_Macrophage; k_rct*PB_HDL*ABCG1*ABCA1*Foam_Cell;  // modifiers: ABCG1, ABCA1
    k_rct = 2e-8 substance;
  re38: CL_HDL_Intima => CL_HDL_Liver; k_clhdll*CL_HDL_Intima;
    k_clhdll = 0.01 substance;
  re39: Empty_HDL => HDL_Lumen; k_hdlt*Empty_HDL;
    k_hdlt = 0.01 substance;
  re40: naive_T_Cell => Th1_Th1; k_th1*naive_T_Cell*IL_12*IL_18;  // modifiers: IL_12, IL_18
    k_th1 = 0.3 substance;
  re41: naive_T_Cell => Th2_Th2; k_th2*naive_T_Cell*IL_4*IL_10;  // modifiers: IL_4, IL_10
    k_th2 = 0 substance;
  re42: naive_T_Cell => Th17_Th17; k_th17*naive_T_Cell*IL_1*IL_10*TGF_Beta;  // modifiers: IL_1, IL_10, TGF_Beta
    k_th17 = 0.1 substance;
  re43: naive_T_Cell => TFH_TFH; k_tfh*naive_T_Cell*IL_6*IL_21;  // modifiers: IL_6, IL_21
    k_tfh = 0 substance;
  re44: naive_T_Cell => Treg; k_treg*naive_T_Cell*IL_10*TGF_Beta;  // modifiers: IL_10, TGF_Beta
    k_treg = 0 substance;
  re45: naive_T_Cell => TNK_TNK; k_tnk*naive_T_Cell;
    k_tnk = 0 substance;
  re46: Foam_Cell => CCL2_Intima; k_mcpi*Foam_Cell;
    k_mcpi = 0.002 substance;
  re47: CCL2_Intima => CCL2_Lumen; k_mcpl*CCL2_Intima/(km_mcpl + CCL2_Intima);
    k_mcpl = 80 substance; km_mcpl = 2000 substance;
  re50: $s90 => Elastin; k_ela*Smooth_Muscle_Cell*TGF_Beta/EGF;  // modifiers: Smooth_Muscle_Cell, TGF_Beta, EGF
    k_ela = 1e-5 substance;
  re51: $s90 => Collagen; k_coll*Smooth_Muscle_Cell;  // modifiers: Smooth_Muscle_Cell
    k_coll = 0.00186 substance;
  re52: $s91 => IFN_Gamma; k_ifng*Th1_Th1*Th17_Th17*Mast_Cell_Mast_Cell;  // modifiers: Th1_Th1, Th17_Th17, Mast_Cell_Mast_Cell
    k_ifng = 66 substance;
  re53: CCL2_Lumen => $s92; d_mcpl*CCL2_Lumen;
    d_mcpl = 80 substance;
  re54: IFN_Gamma => $s94; d_ifng*IFN_Gamma;
    d_ifng = 2 substance;
  re55: MCSF => $s95; d_mcsf*MCSF;
    d_mcsf = 3 substance;
  re56: CCL2_Intima => $s96; d_mcpi*CCL2_Intima;
    d_mcpi = 0.01 substance;
  re57: CXCL9 => $s97; d_cx9*CXCL9;
    d_cx9 = 0.01 substance;
  re58: CXCL10 => $s97; d_cx10*CXCL10;
    d_cx10 = 0.01 substance;
  re59: CXCL11 => $s97; d_cx11*CXCL11;
    d_cx11 = 0.01 substance;
  re60: $s104 => IL_10; k_il10*(B1_Cell_B1_Cell + B2_Cell_B2_Cell + Treg);  // modifiers: B1_Cell_B1_Cell, B2_Cell_B2_Cell, Treg
    k_il10 = 1 substance;
  re61: $s103 => IL_1; k_il1*(Foam_Cell + Smooth_Muscle_Cell);  // modifiers: Foam_Cell, Smooth_Muscle_Cell
    k_il1 = 1e-8 substance;
  re62: $s103 => IL_2; k_il2*(Th1_Th1 + Dendritic_Cell_Dendritic_Cell);  // modifiers: Th1_Th1, Dendritic_Cell_Dendritic_Cell
    k_il2 = 0.0001 substance;
  re63: $s103 => IL_4; k_il4*(Th2_Th2 + TFH_TFH);  // modifiers: Th2_Th2, TFH_TFH
    k_il4 = 0.001 substance;
  re64: $s103 => IL_5; k_il5*Th2_Th2;  // modifiers: Th2_Th2
    k_il5 = 1e-5 substance;
  re66: $s104 => IL_6; k_il6*(Foam_Cell + Smooth_Muscle_Cell + Mast_Cell_Mast_Cell);  // modifiers: Foam_Cell, Smooth_Muscle_Cell, Mast_Cell_Mast_Cell
    k_il6 = 1e-5 substance;
  re67: $s104 => IL_12; k_il12*Dendritic_Cell_Dendritic_Cell*B2_Cell_B2_Cell*Macrophage/(k_mil12 + Macrophage);  // modifiers: Dendritic_Cell_Dendritic_Cell, B2_Cell_B2_Cell, Macrophage
    k_il12 = 900 substance; k_mil12 = 10000000 substance;
  re68: $s105 => IL_17; k_il17*Th17_Th17;  // modifiers: Th17_Th17
    k_il17 = 1 substance;
  re69: $s105 => IL_18; 0;
  re70: $s105 => IL_21; k_il21*TFH_TFH;  // modifiers: TFH_TFH
    k_il21 = 0.001 substance;
  re71: $s105 => IL_33; 0;
  re94: $s110 => MMP1; k_mmp1*Tryptase*Chymase*Foam_Cell;  // modifiers: Tryptase, Chymase, Foam_Cell
    k_mmp1 = 9e-9 substance;
  re95: $s110 => MMP3; k_mmp3*Tryptase*Chymase*Foam_Cell;  // modifiers: Tryptase, Chymase, Foam_Cell
    k_mmp3 = 9e-9 substance;
  re96: $s110 => MMP9; k_mmp9*Foam_Cell*Neutrophil;  // modifiers: Foam_Cell, Neutrophil
    k_mmp9 = 9e-5 substance;
  re97: $s110 => MMP13; k_mmp13*Foam_Cell;  // modifiers: Foam_Cell
    k_mmp13 = 0.001 substance;
  re98: $s111 => TIMP1; k_timp1*Macrophage*Chymase;  // modifiers: Macrophage, Chymase
    k_timp1 = 0.001 substance;
  re99: $s111 => TIMP2; k_timp2*Macrophage;  // modifiers: Macrophage
    k_timp2 = 0.001 substance;
  re100: $s111 => TIMP3; k_timp3*Macrophage;  // modifiers: Macrophage
    k_timp3 = 0.001 substance;
  re101: $s111 => TIMP4; k_timp4*Macrophage;  // modifiers: Macrophage
    k_timp4 = 0.001 substance;
  re102: MMP1 => $s112; d_mmp1*MMP1;  // modifiers: TIMP1, TIMP4, TIMP2, TIMP3
    d_mmp1 = 4.32 substance;
  re103: MMP3 => $s112; d_mmp3*MMP3;  // modifiers: TIMP1, TIMP3, TIMP2, TIMP4
    d_mmp3 = 4.32 substance;
  re105: MMP9 => $s112; d_mmp9*MMP9;  // modifiers: TIMP3, TIMP2, TIMP4, TIMP1
    d_mmp9 = 4.32 substance;
  re106: MMP13 => $s112; d_mmp13*MMP13;  // modifiers: TIMP3, TIMP2, TIMP1
    d_mmp13 = 4.32 substance;
  re107: TIMP1 => $s112; d_timp1*TIMP1;
    d_timp1 = 21.6 substance;
  re108: TIMP2 => $s112; d_timp2*TIMP2;
    d_timp2 = 21.6 substance;
  re109: TIMP3 => $s112; d_timp3*TIMP3;
    d_timp3 = 21.6 substance;
  re110: TIMP4 => $s112; d_timp4*TIMP4;
    d_timp4 = 21.6 substance;
  re111: Chymase => $s113; d_chy*Chymase;
    d_chy = 0.01 substance;
  re112: Tryptase => $s113; d_try*Tryptase;
    d_try = 0.01 substance;
  re114: PDGF => $s113; d_pdgf*PDGF;
    d_pdgf = 0.1 substance;
  re115: $s103 => PDGF; k_pdgf*Foam_Cell/(k_mpdgf + Foam_Cell);  // modifiers: Foam_Cell
    k_pdgf = 200 substance; k_mpdgf = 100000 substance;
  re116: $s113 => TGF_Beta; k_tgf*Treg/(k_mtgf + Treg);  // modifiers: Treg
    k_tgf = 10 substance; k_mtgf = 0.0001 substance;
  re117: Elastin => $s114; d_ela*MMP1*MMP3*MMP9*MMP13;  // modifiers: MMP1, MMP3, MMP9, MMP13
    d_ela = 0.2 substance;
  re118: Collagen => $s114; d_coll*Collagen*(MMP1 + MMP9 + MMP13);  // modifiers: MMP1, MMP9, MMP13
    d_coll = 3.33e-7 substance;
  re119: Smooth_Muscle_Cell => $s115; d_smc*Smooth_Muscle_Cell;
    d_smc = 0.033 substance;
  re120: IL_1Beta => $s116; d_il1bl*IL_1Beta;
    d_il1bl = 0.01 substance;
  re121: $s125 => CCL5; k_ccl5*Platelet_Platelet;  // modifiers: Platelet_Platelet
    k_ccl5 = 0.01 substance;
  re122: CCL5 => $s116; d_ccl5*CCL5;
    d_ccl5 = 0.01 substance;
  re123: $s117 => TNF; k_tnf*Foam_Cell*Mast_Cell_Mast_Cell*Th1_Th1*Th17_Th17*TACE/((km_tnff + Foam_Cell)*(km_tnf + Th1_Th1));  // modifiers: Foam_Cell, Th1_Th1, Mast_Cell_Mast_Cell, Th17_Th17, TACE
    k_tnf = 10000 substance; km_tnf = 1000000 substance; km_tnff = 1000000 substance;
  re124: TNF => $s118; d_tnf*TNF;
    d_tnf = 10 substance;
  re126: $s110 => MMP2; k_mmp2*Foam_Cell;  // modifiers: Foam_Cell
    k_mmp2 = 9e-9 substance;
  re127: MMP2 => $s112; d_mmp2*MMP2;  // modifiers: TIMP2, TIMP4, TIMP1, TIMP3
    d_mmp2 = 4.32 substance;
  re128: Foam_Cell => $s127; d_fc*Foam_Cell;
    d_fc = 0 substance;
  re129: TGF_Beta => $s128; d_tgf*TGF_Beta;
    d_tgf = 0.01 substance;
  re130: $s129 => Tryptase; k_try*Mast_Cell_Mast_Cell;  // modifiers: Mast_Cell_Mast_Cell
    k_try = 1 substance;
  re131: $s129 => Chymase; k_chy*Mast_Cell_Mast_Cell;  // modifiers: Mast_Cell_Mast_Cell
    k_chy = 1 substance;
  re132: Non_activated_Macrophage => $s130; d_nam*Non_activated_Macrophage;
    d_nam = 10000 substance;
  re134: TNK_TNK => sa49_degraded; d_tnk*TNK_TNK;
    d_tnk = 0.06 substance;
  re138: Treg => sa49_degraded; d_treg*Treg;
    d_treg = 0.06 substance;
  re139: TFH_TFH => sa49_degraded; d_tfh*TFH_TFH;
    d_tfh = 0.06 substance;
  re140: Th2_Th2 => sa49_degraded; d_th2*Th2_Th2;
    d_th2 = 0.06 substance;
  re141: Th1_Th1 => sa49_degraded; d_th1*Th1_Th1;
    d_th1 = 0.06 substance;
  re142: Th17_Th17 => sa49_degraded; d_th17*Th17_Th17;
    d_th17 = 0.06 substance;
  re143: naive_T_Cell => sa49_degraded; ;

  // Unit definitions:
  unit substance = mole;
  unit volume = litre;
  unit area = metre^2;
  unit length = metre;
  unit time = second;
end
